<FDM_CONFIG NAME="MD11" VERSION="1.65" RELEASE="ALPHA">
<!--
  File:     MD11.xml
  Author:   Aero-Matic v 0.71

  Inputs:
    name:          MD11
    type:          three-engine transonic transport
    max weight:    630500 lb
    wing span:     169.50 ft
    length:        200.83 ft
    wing area:     3648 sq-ft
    gear type:     tricycle
    retractable?:  yes
    # engines:     3
    engine type:   turbine
    engine layout: wings and tail
    yaw damper?    yes
  Outputs:
    wing loading:  172.83 lb/sq-ft
    CL-alpha:      4.4 per radian
    CL-0:          0.2
    CL-max:        1.2
    CD-0:          0.019
    K:             0.042

-->

 <METRICS>
   AC_WINGAREA  3648.00
   AC_WINGSPAN  169.50
   AC_CHORD     21.52
   AC_HTAILAREA 920.00           <!-- original 912.00 -->
   AC_HTAILARM  90.37
   AC_VTAILAREA 605.0            <!-- original 729.60 -->
   AC_LV        90.37
   AC_IXX       13184993
   AC_IYY       38381564
   AC_IZZ       55612703
   AC_IXZ       0
   AC_EMPTYWT   374243            <!-- original: 378300 -->
   AC_CGLOC     1325.5  0.0 -60.2 <!-- original: 1325.5 0.0 -60.2 -->
   AC_AERORP    1325.5  0.0  0.0
   AC_EYEPTLOC  168.7 -30.0 75.0
   AC_VRP       1325.5 0 0
 </METRICS>
 <UNDERCARRIAGE>
  <!--
     original values for gear, as computed by aeromatic:
     Values are <x, y, Z> coordinates, spring constant and damping coeffcient
      313.3     0.0 -289.2 189150.0 63050.0
     1378.5, -183.1 -289.2 630500.0 126100.0
     1378.5   183.1 -289.2 630500.0 126100.0

  -->
  AC_GEAR NOSE_LG   334.6    0.0 -289.2 189150.0 63050.0   0.5  0.8  0.02 STEERABLE NONE  60.0 RETRACT
  AC_GEAR LEFT_MLG  1302.8 -210.6 -289.2 630500.0 126100.0  0.5  0.8  0.02 FIXED     LEFT  0    RETRACT
  AC_GEAR RIGHT_MLG 1302.8  210.6 -289.2 630500.0 126100.0  0.5  0.8  0.02 FIXED     RIGHT 0    RETRACT
 </UNDERCARRIAGE>
 <PROPULSION>
  <AC_ENGINE FILE="CF6-80C2">
    XLOC 1325.478
    YLOC -339
    ZLOC -40
    PITCH 0
    YAW 0
    FEED 0
    FEED 1
    FEED 2
    FEED 3
    FEED 4

  <AC_THRUSTER FILE="direct">
    XLOC 1325.478
    YLOC -339
    ZLOC -40
    PITCH 0
    YAW 0
  </AC_THRUSTER>
  </AC_ENGINE>
  <AC_ENGINE FILE="CF6-80C2">
    XLOC 2400.83
    YLOC 0
    ZLOC 60
    PITCH 0
    YAW 0
    FEED 0
    FEED 1
    FEED 2
    FEED 3
    FEED 4

  <AC_THRUSTER FILE="direct">
    XLOC 2400.83
    YLOC 0
    ZLOC 60
    PITCH 0
    YAW 0
  </AC_THRUSTER>
  </AC_ENGINE>

  <AC_ENGINE FILE="CF6-80C2">
    XLOC 1325.478
    YLOC 339
    ZLOC -40
    PITCH 0
    YAW 0
    FEED 0
    FEED 1
    FEED 2
    FEED 3
    FEED 4

  <AC_THRUSTER FILE="direct">
    XLOC 1325.478
    YLOC 339
    ZLOC -40
    PITCH 0
    YAW 0
  </AC_THRUSTER>
  </AC_ENGINE>

  <!-- According to [1], the MD11 has a grand total of 5 fuel tanks -->
  <!-- Two (left/right) wing tanks, one main center tank            -->
  <!-- One Auxilary tank                                            -->
  <!-- One Tank in the tail. IIRC, this tank is optional though     -->
  <!-- Tanks Section                                                -->
  <!-- Capacity in pounds of each tank is as follows                -->
  <!-- -->
  <!-- Left Wing  : 40491 pounds                                    -->
  <!-- Right Wing : 40491 pounds                                    -->
  <!-- Center tank: 64040 pounds                                    -->
  <!-- Auxilary   : 98111 pounds                                    -->
  <!-- Tail Tank  : 13124 pounds                                    -->

 <!-- Left Wing -->
 <AC_TANK TYPE="FUEL" NUMBER="0">
    XLOC 1300.478
    YLOC -202
    ZLOC -60.249
    RADIUS 1
    CAPACITY  40491.0
    CONTENTS  40491.0
  </AC_TANK>

  <!-- Right Wing -->
  <AC_TANK TYPE="FUEL" NUMBER="1">
    XLOC 1300.478
    YLOC 202
    ZLOC -60.249
    RADIUS 1
    CAPACITY  40491.0
    CONTENTS  40491.0
  </AC_TANK>

  <!-- Main Center -->
  <AC_TANK TYPE="FUEL" NUMBER="2">
    XLOC 1300.478
    YLOC 0
    ZLOC -60.249
    RADIUS 1
    CAPACITY  64040.0
    CONTENTS  64040.0
  </AC_TANK>

  <!-- Auxilary -->
  <AC_TANK TYPE="FUEL" NUMBER="3">
    XLOC 1300.478
    YLOC 0
    ZLOC -60.249
    RADIUS 1
    CAPACITY  98111.0
    CONTENTS  98111.0
  </AC_TANK>

 <!-- Tail -->
  <AC_TANK TYPE="FUEL" NUMBER="4">
    XLOC 2405.478                    <!-- Was 1325.478 -->
    YLOC 0
    ZLOC 240.00                      <!-- Was  -60.249 -->
    RADIUS 1
    CAPACITY  13124.0
    CONTENTS  13124.0
  </AC_TANK>

 </PROPULSION>
 <FLIGHT_CONTROL NAME="MD11">
   <COMPONENT NAME="Pitch Trim Sum" TYPE="SUMMER">
      INPUT   fcs/elevator-cmd-norm
      INPUT   fcs/pitch-trim-cmd-norm
      CLIPTO  -1 1
   </COMPONENT>
   <COMPONENT NAME="Elevator Control" TYPE="AEROSURFACE_SCALE">
      INPUT   fcs/pitch-trim-sum
      MIN     -0.350
      MAX      0.300
      OUTPUT  fcs/elevator-pos-rad
   </COMPONENT>
   <COMPONENT NAME="Roll Trim Sum" TYPE="SUMMER">
      INPUT   fcs/aileron-cmd-norm
      INPUT   fcs/roll-trim-cmd-norm
      CLIPTO  -1 1
   </COMPONENT>
   <COMPONENT NAME="Left Aileron Control" TYPE="AEROSURFACE_SCALE">
      INPUT   fcs/roll-trim-sum
      MIN    -0.35
      MAX     0.35
      OUTPUT  fcs/left-aileron-pos-rad
   </COMPONENT>
   <COMPONENT NAME="Right Aileron Control" TYPE="AEROSURFACE_SCALE">
      INPUT  -fcs/roll-trim-sum
      MIN    -0.35
      MAX     0.35
      OUTPUT  fcs/right-aileron-pos-rad
   </COMPONENT>
   <COMPONENT NAME="Rudder Command Sum" TYPE="SUMMER">
      INPUT   fcs/rudder-cmd-norm
      INPUT   fcs/yaw-trim-cmd-norm
      CLIPTO  -1 1
   </COMPONENT>
   <COMPONENT NAME="Yaw Damper Rate" TYPE="SCHEDULED_GAIN">
      INPUT        velocities/r-aero-rad_sec
      SCHEDULED_BY aero/qbar-psf
      ROWS         2
       3.00        0.00
      11.00        2.00
   </COMPONENT>
   <COMPONENT NAME="Yaw Damper Beta" TYPE="SCHEDULED_GAIN">
      INPUT        aero/beta-rad
      SCHEDULED_BY aero/qbar-psf
      ROWS         2
       3.00        0.00
      11.00        0.00
   </COMPONENT>
   <COMPONENT NAME="Yaw Damper Sum" TYPE="SUMMER">
      INPUT        fcs/yaw-damper-beta
      INPUT        fcs/yaw-damper-rate
      CLIPTO      -0.2 0.2
   </COMPONENT>
   <COMPONENT NAME="Yaw Damper Final" TYPE="SCHEDULED_GAIN">
      INPUT        fcs/yaw-damper-sum
      SCHEDULED_BY aero/qbar-psf
      ROWS         2
      2.99         0.0
      3.00         1.0
   </COMPONENT>
   <COMPONENT NAME="Rudder Sum" TYPE="SUMMER">
      INPUT   fcs/rudder-command-sum
      INPUT   fcs/yaw-damper-final
      CLIPTO  -1 1
   </COMPONENT>
   <COMPONENT NAME="Rudder Control" TYPE="AEROSURFACE_SCALE">
      INPUT   fcs/rudder-sum
      MIN     -0.35
      MAX      0.35
      OUTPUT  fcs/rudder-pos-rad
   </COMPONENT>
   <COMPONENT NAME="Flaps Control" TYPE="KINEMAT">
     INPUT   fcs/flap-cmd-norm
    DETENTS 9
             0       0
             0.125   5
             0.250   4
             0.375   3
             0.500   2
             0.625   2
             0.750   2
             0.875   2
             1.000   2
     OUTPUT  fcs/flap-pos-deg
   </COMPONENT>
   <COMPONENT NAME="Gear Control" TYPE="KINEMAT">
     INPUT   gear/gear-cmd-norm
     DETENTS 2
             0   0
             1   5
     OUTPUT  gear/gear-pos-norm
   </COMPONENT>
   <COMPONENT NAME="Speedbrake Control" TYPE="KINEMAT">
     INPUT   fcs/speedbrake-cmd-norm
     DETENTS 2
             0   0
             1   1
     OUTPUT  fcs/speedbrake-pos-norm
   </COMPONENT>
 </FLIGHT_CONTROL>
 <AERODYNAMICS>
  <AXIS NAME="LIFT">
    <COEFFICIENT NAME="CLalpha" TYPE="VECTOR">
      Lift_due_to_alpha
      4
      aero/alpha-rad
      aero/qbar-psf|metrics/Sw-sqft
      -0.20   -0.680
       0.00    0.200
       0.23    1.200
       0.60    0.600
    </COEFFICIENT>
    <COEFFICIENT NAME="dCLflap" TYPE="VALUE">
       Delta_Lift_due_to_flaps
       aero/qbar-psf|metrics/Sw-sqft|fcs/components/flaps-control/output-norm
       1.5
    </COEFFICIENT>
    <COEFFICIENT NAME="dCLsb" TYPE="VALUE">
       Delta_Lift_due_to_speedbrake
       aero/qbar-psf|metrics/Sw-sqft|fcs/speedbrake-pos-norm
       -0.09
    </COEFFICIENT>
    <COEFFICIENT NAME="CLde" TYPE="VALUE">
       Lift_due_to_Elevator_Deflection
       aero/qbar-psf|metrics/Sw-sqft|fcs/elevator-pos-rad
       0.2
    </COEFFICIENT>
  </AXIS>
  <AXIS NAME="DRAG">
    <COEFFICIENT NAME="CD0" TYPE="VECTOR">
       Drag_at_zero_lift
       5
       aero/alpha-rad
       aero/qbar-psf|metrics/Sw-sqft
       -1.57       1.500
       -0.26       0.038
        0.00       0.019
        0.26       0.038
        1.57       1.500
    </COEFFICIENT>
    <COEFFICIENT NAME="CDi" TYPE="VALUE">
       Induced_drag
       aero/qbar-psf|metrics/Sw-sqft|aero/cl-squared-norm
       0.042
    </COEFFICIENT>
    <COEFFICIENT NAME="CDmach" TYPE="VECTOR">
       Drag_due_to_mach
       4
       velocities/mach-norm
       aero/qbar-psf|metrics/Sw-sqft
       0.0       0.000
       0.79      0.000
       1.1       0.023
       1.8       0.015
    </COEFFICIENT>
    <COEFFICIENT NAME="CDflap" TYPE="VALUE">
       Drag_due_to_flaps
       aero/qbar-psf|metrics/Sw-sqft|fcs/components/flaps-control/output-norm
       0.057
    </COEFFICIENT>
    <COEFFICIENT NAME="CDgear" TYPE="VALUE">
       Drag_due_to_gear
       aero/qbar-psf|metrics/Sw-sqft|gear/gear-pos-norm
       0.013
    </COEFFICIENT>
    <COEFFICIENT NAME="CDsb" TYPE="VALUE">
       Drag_due_to_speedbrakes
       aero/qbar-psf|metrics/Sw-sqft|fcs/speedbrake-pos-norm
       0.019
    </COEFFICIENT>
    <COEFFICIENT NAME="CDbeta" TYPE="VECTOR">
       Drag_due_to_sideslip
       5
       aero/beta-rad
       aero/qbar-psf|metrics/Sw-sqft
       -1.57       1.230
       -0.26       0.050
        0.00       0.00
        0.26       0.050
        1.57       1.230
    </COEFFICIENT>
    <COEFFICIENT NAME="CDde" TYPE="VALUE">
       Drag_due_to_Elevator_Deflection
       aero/qbar-psf|metrics/Sw-sqft|fcs/elevator-pos-norm
       0.057
    </COEFFICIENT>
  </AXIS>
  <AXIS NAME="SIDE">
    <COEFFICIENT NAME="CYb" TYPE="VALUE">
       Side_force_due_to_beta
       aero/qbar-psf|metrics/Sw-sqft|aero/beta-rad
       -1
    </COEFFICIENT>
  </AXIS>
  <AXIS NAME="ROLL">
    <COEFFICIENT NAME="Clb" TYPE="VALUE">
       Roll_moment_due_to_beta
       aero/qbar-psf|metrics/Sw-sqft|metrics/bw-ft|aero/beta-rad
       -0.1
    </COEFFICIENT>
    <COEFFICIENT NAME="Clp" TYPE="VALUE">
       Roll_moment_due_to_roll_rate
       aero/qbar-psf|metrics/Sw-sqft|metrics/bw-ft|aero/bi2vel|velocities/p-aero-rad_sec
       -0.4
    </COEFFICIENT>
    <COEFFICIENT NAME="Clr" TYPE="VALUE">
       Roll_moment_due_to_yaw_rate
       aero/qbar-psf|metrics/Sw-sqft|metrics/bw-ft|aero/bi2vel|velocities/r-aero-rad_sec
       0.15
    </COEFFICIENT>
    <COEFFICIENT NAME="Clda" TYPE="VECTOR">
       Roll_moment_due_to_aileron
       2
       velocities/mach-norm
       aero/qbar-psf|metrics/Sw-sqft|metrics/bw-ft|fcs/left-aileron-pos-rad
       0.0       0.1
       2.0       0.033
    </COEFFICIENT>
    <COEFFICIENT NAME="Cldr" TYPE="VALUE">
       Roll_moment_due_to_rudder
       aero/qbar-psf|metrics/Sw-sqft|metrics/bw-ft|fcs/rudder-pos-rad
       0.01
    </COEFFICIENT>
  </AXIS>
  <AXIS NAME="PITCH">
    <COEFFICIENT NAME="Cmalpha" TYPE="VALUE">
       Pitch_moment_due_to_alpha
       aero/qbar-psf|metrics/Sw-sqft|metrics/cbarw-ft|aero/alpha-rad
       -0.6
    </COEFFICIENT>
    <COEFFICIENT NAME="Cmde" TYPE="VECTOR">
       Pitch_moment_due_to_elevator
       2
       velocities/mach-norm
       aero/qbar-psf|metrics/Sw-sqft|metrics/cbarw-ft|fcs/elevator-pos-rad
       0.0       -1.2
       2.0       -0.300
    </COEFFICIENT>
    <COEFFICIENT NAME="Cmq" TYPE="VALUE">
       Pitch_moment_due_to_pitch_rate
       aero/qbar-psf|metrics/Sw-sqft|metrics/cbarw-ft|aero/ci2vel|velocities/q-aero-rad_sec
       -17
    </COEFFICIENT>
    <COEFFICIENT NAME="Cmadot" TYPE="VALUE">
       Pitch_moment_due_to_alpha_rate
       aero/qbar-psf|metrics/Sw-sqft|metrics/cbarw-ft|aero/ci2vel|aero/alphadot-rad_sec
       -6
    </COEFFICIENT>
  </AXIS>
  <AXIS NAME="YAW">
    <COEFFICIENT NAME="Cnb" TYPE="VALUE">
       Yaw_moment_due_to_beta
       aero/qbar-psf|metrics/Sw-sqft|metrics/bw-ft|aero/beta-rad
       0.12
    </COEFFICIENT>
    <COEFFICIENT NAME="Cnr" TYPE="VALUE">
       Yaw_moment_due_to_yaw_rate
       aero/qbar-psf|metrics/Sw-sqft|metrics/bw-ft|aero/bi2vel|velocities/r-aero-rad_sec
       -0.15
    </COEFFICIENT>
    <COEFFICIENT NAME="Cndr" TYPE="VALUE">
       Yaw_moment_due_to_rudder
       aero/qbar-psf|metrics/Sw-sqft|metrics/bw-ft|fcs/rudder-pos-rad
       -0.1
    </COEFFICIENT>
    <COEFFICIENT NAME="Cnda" TYPE="VALUE">
       Adverse_yaw
       aero/qbar-psf|metrics/Sw-sqft|metrics/bw-ft|fcs/left-aileron-pos-rad
       0
    </COEFFICIENT>
  </AXIS>
 </AERODYNAMICS>
</FDM_CONFIG>

<!-- References -->
<!-- http://www.simviation.com/rinfofuel.htm -->
